# OpenSim document version 30000
InverseKinematicsTool subject01:
  results_directory: D:\Dropbox\PhD\GAT\Results\S2\Assistance1\Context2\1\IK
  model_file: D:\Dropbox\PhD\GAT\Models\S1\no_APO_adjusted.osim
  accuracy: 1e-5
  marker_file: D:\Dropbox\PhD\GAT\Data\S2\Assistance1\Context2\Markers\NE41.trc
  time_range: 1.05 2.26
  report_errors: true
  output_motion_file: D:\Dropbox\PhD\GAT\Results\S2\Assistance1\Context2\1\IK\ik.mot
  report_marker_locations: true
  IKTaskSet:
    IKMarkerTask Clavicle: apply=true weight=1
    IKMarkerTask R_Heel: apply=true weight=1
    IKMarkerTask R_MTP5: apply=true weight=1
    IKMarkerTask R_MTP1: apply=true weight=1
    IKMarkerTask L_Heel: apply=true weight=1
    IKMarkerTask L_MTP5: apply=true weight=1
    IKMarkerTask L_MTP1: apply=true weight=1
    IKMarkerTask R_Thigh_Upper: apply=true weight=1
    IKMarkerTask R_Thigh_Front: apply=true weight=1
    IKMarkerTask R_Thigh_Rear: apply=true weight=1
    IKMarkerTask R_Shank_Upper: apply=true weight=1
    IKMarkerTask R_Shank_Front: apply=true weight=1
    IKMarkerTask R_Shank_Rear: apply=true weight=1
    IKMarkerTask L_Thigh_Upper: apply=true weight=1
    IKMarkerTask L_Thigh_Front: apply=true weight=1
    IKMarkerTask L_Thigh_Rear: apply=true weight=1
    IKMarkerTask L_Shank_Upper: apply=true weight=1
    IKMarkerTask L_Shank_Front: apply=true weight=1
    IKMarkerTask L_Shank_Rear: apply=true weight=1
    IKMarkerTask R_Acromium: apply=true weight=5
    IKMarkerTask L_Acromium: apply=true weight=5
    IKMarkerTask R_ASIS: apply=true weight=2
    IKMarkerTask L_ASIS: apply=true weight=2
    IKMarkerTask V_Sacral: apply=true weight=2
